# OpenSim document version 40600
Model ShoulderWrappingWithPathSprings:
  gravity: 0 -9.80665 0
  publications: List of publications related to model...
  length_units: meters
  force_units: N
  credits:
    Ricardo Matias and Ajay Seth. Model musculature by RMatias and Scapulothoracic joint mechanics by ASeth
  Ground
  BodySet:
    Body thorax: mass=0 [kg] mass_center=(0 0 0) inertia=(0 0 0 0 0 0) meshes=(thorax.vtp groundspine.vtp)
      WrapEllipsoid Thorax: xyz_body_rotation=(-0.0146608 -0.0383972 0.212232) translation=(-0.0185 -0.1467 0.0653)
          quadrant=all dimensions=(0.083 0.2 0.07)
      WrapEllipsoid EllipsoidSurface: translation=(-0.02 -0.0173 0.0609) quadrant=all dimensions=(0.09 0.27 0.08)
    Body clavicle: mass=0.156 mass_center=(-0.02172 0.01007 0.06704) inertia=(6.4e-6 2.63e-5 2.43e-5 0 0 0)
        meshes=clavicle.vtp
    Body scapula: mass=0.7054 mass_center=(-0.04612 -0.0319 -0.04565) inertia=(0.001 0.001 0.001 0 0 0)
        meshes=scapula.vtp
      WrapTorus Subscapuralis: xyz_body_rotation=(-0.1258 0.4847 0.159) translation=(0.0101 -0.039 -0.0428)
          quadrant=all inner_radius=0.01 outer_radius=0.035
      WrapTorus Tmajscapula: xyz_body_rotation=(0.0404916 0.605455 0.0106465) translation=(-0.1103 -0.1162 -0.0401)
          quadrant=all inner_radius=0.01 outer_radius=0.025
      WrapTorus Infra: xyz_body_rotation=(-0.2009 0.1333 -0.1595) translation=(-0.0634 -0.031 -0.0066) quadrant=all
          inner_radius=0.004 outer_radius=0.025
      WrapEllipsoid deltsca: xyz_body_rotation=(1.4823 0.1606 -0.4472) translation=(-0.0343 -0.0334 -0.0443)
          quadrant=all dimensions=(0.04 0.09 0.03)
    Body humerus: mass=2.0519 mass_center=(0.00537 -0.11493 -0.00261) inertia=(0.0132 0.001988 0.0132 0 0 0)
        meshes=humerus.vtp
      WrapSphere hhead: translation=(-0.0032 0.0049 -0.002) quadrant=all radius=0.023
      WrapCylinder PectMajor: xyz_body_rotation=(1.6308 -0.0412 0.4875) translation=(0.0006 -0.0598 -0.0025)
          quadrant=-y radius=0.0095 length=0.1
      WrapEllipsoid TeresMajor: xyz_body_rotation=(1.6607 -0.0188 0.0325) translation=(-0.0008 -0.0598 -0.0017)
          quadrant=-y dimensions=(0.002 0.007 0.08)
      WrapCylinder LatDorsi: xyz_body_rotation=(1.62071 -0.0853466 0.321664) translation=(-0.0029 -0.0605 -0.0016)
          quadrant=-y radius=0.0065 length=0.1
      WrapSphere hheadsupraTminor: translation=(-0.0008 0.0048 0.0023) quadrant=all radius=0.022
      WrapEllipsoid hheadInfra: xyz_body_rotation=(0.1419 0.13474 0.28117) translation=(0.0001 0.001 -0.0048)
          quadrant=all dimensions=(0.028 0.022 0.03)
    Body ulna: mass=0.5464 mass_center=(-0.00927581 -0.105108 0.0261565) inertia=(0.0030585 0.00045325 0.0030585 0 0 0)
        meshes=ulna.vtp
      WrapCylinder PQ2: xyz_body_rotation=(1.39138 0.0689405 1.52245) translation=(-0.0012 -0.2092 0.0428) quadrant=all
          radius=0.007 length=0.01
    Body radius: mass=0.5464 mass_center=(0.0154894 -0.104396 0.0138558) inertia=(0.0030585 0.00045325 0.0030585 0 0 0)
        meshes=radius.vtp
    Body hand: mass=0.525 mass_center=(0.00262 -0.03594 -0.00037) inertia=(0.0006387 0.0001904 0.0006387 0 0 0)
  JointSet:
    WeldJoint ground_thorax: socket_parent_frame=ground_offset socket_child_frame=thorax_offset
      PhysicalOffsetFrame ground_offset: socket_parent=/ground translation=(0 0 0) [meters]
      PhysicalOffsetFrame thorax_offset: socket_parent=/bodyset/thorax translation=(0 0 0)
    CustomJoint sternoclavicular: socket_parent_frame=thorax_offset socket_child_frame=clavicle_offset
      Coordinate clav_prot: default_value=-0.3003886 range=(-3.141593 3.141593) clamped=true locked=true
      Coordinate clav_elev: default_value=-0.3379306 range=(-3.141593 3.141593) clamped=true locked=true
      PhysicalOffsetFrame thorax_offset: socket_parent=/bodyset/thorax translation=(0.006325 0.00693 0.025465)
      PhysicalOffsetFrame clavicle_offset: socket_parent=/bodyset/clavicle translation=(0 0 0)
      SpatialTransform: axes_held_at_zero=(translation1 translation2 translation3)
        TransformAxis rotation1: coordinates=clav_prot axis=(0.0153 0.9892987 -0.1451) LinearFunction(coefficients=1 0)
        TransformAxis rotation2: coordinates=clav_elev axis=(-0.9944725 0 -0.104997) LinearFunction(coefficients=1 0)
        TransformAxis rotation3: axis=(-0.0292 0.0202 0.1201) Constant(value=-1.202e-5)
    EllipsoidJoint scapulothoracic: socket_parent_frame=thorax_offset socket_child_frame=scapula_offset
        radii_x_y_z=(0.09 0.27 0.08)
      Coordinate scapula_abduction: default_value=-0.3003886 range=(-3.141593 3.141593) clamped=true locked=true
      Coordinate scapula_elevation: default_value=0.1126435 range=(-3.141593 3.141593) clamped=true locked=true
      Coordinate scapula_upward_rot: default_value=0.3629761 range=(-3.141593 3.141593) clamped=true
      PhysicalOffsetFrame thorax_offset: socket_parent=/bodyset/thorax translation=(-0.02 -0.0173 0.0609)
      PhysicalOffsetFrame scapula_offset: socket_parent=/bodyset/scapula translation=(-0.05982 -0.03904 -0.056)
          orientation=(0 -0.87 -0.6) [radians]
    CustomJoint GlenoHumeral: socket_parent_frame=scapula_offset socket_child_frame=humerus_offset
      Coordinate elv_angle: default_value=-0.3184528 range=(-0.78 2.53) clamped=false locked=true
      Coordinate shoulder_elv: default_value=-0.316498 default_speed_value=1 range=(-1.5 3.141593) clamped=true
          locked=true
      Coordinate shoulder_rot: default_value=-0.2628466 default_speed_value=1 range=(-3.141593 3.141593) clamped=true
          locked=true
      PhysicalOffsetFrame scapula_offset: socket_parent=/bodyset/scapula translation=(-0.00955 -0.034 0.009)
      PhysicalOffsetFrame humerus_offset: socket_parent=/bodyset/humerus translation=(0 0 0)
      SpatialTransform: axes_held_at_zero=(translation1 translation2 translation3)
        TransformAxis rotation1: coordinates=elv_angle axis=(0 1 0) LinearFunction(coefficients=1 0)
        TransformAxis rotation2: coordinates=shoulder_elv axis=(-0.9982614 0.0023 0.05889802)
            LinearFunction(coefficients=1 0)
        TransformAxis rotation3: coordinates=shoulder_rot axis=(0.0048 0.9990892 0.04240001)
            LinearFunction(coefficients=1 0)
    CustomJoint elbow: socket_parent_frame=humerus_offset socket_child_frame=ulna_offset
      Coordinate elbow_flexion: default_value=1.464401 range=(0 2.268928) clamped=false
      PhysicalOffsetFrame humerus_offset: socket_parent=/bodyset/humerus translation=(0.0061 -0.2904 -0.0123)
      PhysicalOffsetFrame ulna_offset: socket_parent=/bodyset/ulna translation=(0 0 0)
      SpatialTransform: axes_held_at_zero=(rotation1 rotation2 translation1 translation2 translation3)
        TransformAxis rotation3: coordinates=elbow_flexion axis=(0.04940001 0.03660001 0.9981083)
            LinearFunction(coefficients=1 0)
    CustomJoint radioulnar: socket_parent_frame=ulna_offset socket_child_frame=radius_offset
      Coordinate pro_sup: default_value=-1.570796 range=(-1.570796 1.570796) clamped=false locked=true
      PhysicalOffsetFrame ulna_offset: socket_parent=/bodyset/ulna translation=(0.0004 -0.011503 0.019999)
      PhysicalOffsetFrame radius_offset: socket_parent=/bodyset/radius translation=(0 0 0)
      SpatialTransform: axes_held_at_zero=(rotation1 rotation3 translation1 translation2 translation3)
        TransformAxis rotation2: coordinates=pro_sup axis=(-0.01716099 0.9926656 -0.119668)
            LinearFunction(coefficients=1 0)
    WeldJoint rc: socket_parent_frame=radius_offset socket_child_frame=hand_offset
      PhysicalOffsetFrame radius_offset: socket_parent=/bodyset/radius translation=(0.01903 -0.24348 0.02628)
      PhysicalOffsetFrame hand_offset: socket_parent=/bodyset/hand translation=(0 0 0)
  ForceSet:
    PathSpring TrapeziusScapula1: resting_length=0.1765182 [m] stiffness=10 [N/m] dissipation=2 [s/m]
      PathPoint P1: thorax (-0.07575 0.03325 -0.00793)
      PathPoint P2: scapula (-0.03824 0.00797 -0.01178)
      PathWrap: wrap_object=Thorax method=hybrid
    PathSpring TrapeziusScapula2: resting_length=0.1752364 stiffness=10 dissipation=2
      PathPoint P1: thorax (-0.07652 0.03078 -0.00798)
      PathPoint P2: scapula (-0.05175 0.00689 -0.02445)
      PathWrap: wrap_object=Thorax method=hybrid
    PathSpring TrapeziusScapula3: resting_length=0.1676575 stiffness=10 dissipation=2
      PathPoint P1: thorax (-0.07839 0.02393 -0.00465)
      PathPoint P2: scapula (-0.0619 0.00197 -0.04442)
      PathWrap: wrap_object=Thorax method=hybrid
    PathSpring TrapeziusScapula4: resting_length=0.1635125 stiffness=10 dissipation=2
      PathPoint P1: thorax (-0.08078 0.01928 -0.00434)
      PathPoint P2: scapula (-0.06709 -0.00038 -0.05604)
      PathWrap: wrap_object=Thorax method=hybrid
    PathSpring TrapeziusScapula5: resting_length=0.1581665 stiffness=10 dissipation=2
      PathPoint P1: thorax (-0.0831 0.00991 -0.00428)
      PathPoint P2: scapula (-0.06636 -0.00088 -0.0647)
      PathWrap: wrap_object=Thorax method=hybrid
    PathSpring TrapeziusScapula6: resting_length=0.1764874 stiffness=10 dissipation=2
      PathPoint P1: thorax (-0.09024 -0.01245 -0.0068)
      PathPoint P2: scapula (-0.06973 -0.00372 -0.05366)
      PathWrap: wrap_object=Thorax method=hybrid
    PathSpring TrapeziusScapula7: resting_length=0.1720627 stiffness=10 dissipation=2
      PathPoint P1: thorax (-0.09715 -0.04089 -0.00571)
      PathPoint P2: scapula (-0.06636 -0.00088 -0.0647)
      PathWrap: wrap_object=Thorax method=hybrid
    PathSpring TrapeziusScapula8: resting_length=0.183109 stiffness=10 dissipation=2
      PathPoint P1: thorax (-0.10006 -0.06502 -0.00171)
      PathPoint P2: scapula (-0.07108 -0.00356 -0.06083)
      PathWrap: wrap_object=Thorax method=hybrid
    PathSpring TrapeziusScapula9: resting_length=0.1828699 stiffness=10 dissipation=2
      PathPoint P1: thorax (-0.10052 -0.10422 -0.00085)
      PathPoint P2: scapula (-0.0741 -0.00589 -0.08033)
      PathWrap: wrap_object=Thorax method=hybrid
    PathSpring TrapeziusScapula10: resting_length=0.2049715 stiffness=10 dissipation=2
      PathPoint P1: thorax (-0.10162 -0.13457 0.00115)
      PathPoint P2: scapula (-0.07572 -0.00945 -0.07389)
      PathWrap: wrap_object=Thorax method=hybrid
    PathSpring TrapeziusScapula11: resting_length=0.2270601 stiffness=10 dissipation=2
      PathPoint P1: thorax (-0.09736 -0.1597 0.00324)
      PathPoint P2: scapula (-0.07473 -0.00927 -0.06712)
      PathWrap: wrap_object=Thorax method=hybrid
    PathSpring TrapeziusClavicle1: resting_length=0.1565077 stiffness=10 dissipation=2
      PathPoint P1: thorax (-0.06682 0.13828 0.00048)
      PathPoint P2: scapula (-0.01735 0.00765 -0.05004)
      PathWrap: wrap_object=Thorax method=hybrid
    PathSpring TrapeziusClavicle2: resting_length=0.1413707 stiffness=10 dissipation=2
      PathPoint P1: thorax (-0.06791 0.07713 0.00478)
      PathPoint P2: scapula (-0.02153 0.01027 -0.02687)
      PathWrap: wrap_object=Thorax method=hybrid
    PathSpring SerratusAnterior1: resting_length=0.06221405 stiffness=10 dissipation=2
      PathPoint P1: scapula (-0.1063 -0.11725 -0.0893)
      PathPoint P2: thorax (-0.02406 -0.17218 0.13548)
      PathWrap: wrap_object=Thorax method=hybrid
    PathSpring SerratusAnterior2: resting_length=0.04636382 stiffness=10 dissipation=2
      PathPoint P1: scapula (-0.10352 -0.11112 -0.09357)
      PathPoint P2: thorax (-0.01525 -0.15222 0.1377)
      PathWrap: wrap_object=Thorax method=hybrid
    PathSpring SerratusAnterior3: resting_length=0.02467261 stiffness=10 dissipation=2
      PathPoint P1: scapula (-0.10435 -0.11898 -0.09064)
      PathPoint P2: thorax (-0.00439 -0.12424 0.1366)
      PathWrap: wrap_object=Thorax method=hybrid
    PathSpring SerratusAnterior4: resting_length=0.03064908 stiffness=10 dissipation=2
      PathPoint P1: scapula (-0.10176 -0.11434 -0.08962)
      PathPoint P2: thorax (-0.00038 -0.09869 0.13121)
      PathWrap: wrap_object=Thorax method=hybrid
    PathSpring SerratusAnterior5: resting_length=0.04452256 stiffness=10 dissipation=2
      PathPoint P1: scapula (-0.10073 -0.10932 -0.09138)
      PathPoint P2: thorax (-0.00424 -0.0728 0.12681)
      PathWrap: wrap_object=Thorax method=hybrid
    PathSpring SerratusAnterior6: resting_length=0.07239323 stiffness=10 dissipation=2
      PathPoint P1: scapula (-0.10018 -0.10488 -0.08852)
      PathPoint P2: thorax (-0.02159 -0.04033 0.11046)
      PathWrap: wrap_object=Thorax method=hybrid
    PathSpring SerratusAnterior7: resting_length=0.0428402 stiffness=10 dissipation=2
      PathPoint P1: scapula (-0.09367 -0.06399 -0.09741)
      PathPoint P2: thorax (-0.02046 -0.04565 0.11871)
      PathWrap: wrap_object=Thorax method=hybrid
    PathSpring SerratusAnterior8: resting_length=0.04845849 stiffness=10 dissipation=2
      PathPoint P1: scapula (-0.08698 -0.0375 -0.10019)
      PathPoint P2: thorax (-0.02524 -0.0253 0.11037)
      PathWrap: wrap_object=Thorax method=hybrid
    PathSpring SerratusAnterior9: resting_length=0.05336097 stiffness=10 dissipation=2
      PathPoint P1: scapula (-0.07608 -0.01087 -0.10327)
      PathPoint P2: thorax (-0.03307 -0.00233 0.09429)
      PathWrap: wrap_object=Thorax method=hybrid
    PathSpring SerratusAnterior10: resting_length=0.04679137 stiffness=10 dissipation=2
      PathPoint P1: scapula (-0.06696 0.00161 -0.09518)
      PathPoint P2: thorax (-0.03609 0.00116 0.09079)
      PathWrap: wrap_object=Thorax method=hybrid
    PathSpring SerratusAnterior11: resting_length=0.04257881 stiffness=10 dissipation=2
      PathPoint P1: scapula (-0.06087 0.00419 -0.09274)
      PathPoint P2: thorax (-0.03307 -0.00233 0.09429)
      PathWrap: wrap_object=Thorax method=hybrid
    PathSpring SerratusAnterior12: resting_length=0.04073434 stiffness=10 dissipation=2
      PathPoint P1: scapula (-0.04851 0.009 -0.08467)
      PathPoint P2: thorax (-0.02816 -0.00603 0.0967)
      PathWrap: wrap_object=Thorax method=hybrid
    PathSpring Rhomboideus1: resting_length=0.1587634 stiffness=10 dissipation=2
      PathPoint P1: thorax (-0.0733 0.04018 -0.00204)
      PathPoint P2: scapula (-0.08267 -0.02291 -0.10177)
      PathWrap: wrap_object=Thorax method=hybrid
    PathSpring Rhomboideus2: resting_length=0.2139071 stiffness=10 dissipation=2
      PathPoint P1: thorax (-0.07801 0.02965 -0.00118)
      PathPoint P2: scapula (-0.10317 -0.08678 -0.09993)
      PathWrap: wrap_object=Thorax method=hybrid
    PathSpring Rhomboideus3: resting_length=0.2054945 stiffness=10 dissipation=2
      PathPoint P1: thorax (-0.08469 0.00913 0.00052)
      PathPoint P2: scapula (-0.10501 -0.09164 -0.10029)
      PathWrap: wrap_object=Thorax method=hybrid
    PathSpring Rhomboideus4: resting_length=0.2071918 stiffness=10 dissipation=2
      PathPoint P1: thorax (-0.09066 -0.00927 -0.00051)
      PathPoint P2: scapula (-0.10731 -0.10247 -0.09847)
      PathWrap: wrap_object=Thorax method=hybrid
    PathSpring Rhomboideus5: resting_length=0.2044873 stiffness=10 dissipation=2
      PathPoint P1: thorax (-0.09736 -0.03208 0.00148)
      PathPoint P2: scapula (-0.10805 -0.11342 -0.09683)
      PathWrap: wrap_object=Thorax method=hybrid
    PathSpring LevatorScapulae1: resting_length=0.173224 stiffness=10 dissipation=2
      PathPoint P1: thorax (-0.03481 0.12106 0.03108)
      PathPoint P2: scapula (-0.07801 -0.00808 -0.10292)
      PathWrap: wrap_object=Thorax method=hybrid
    PathSpring LevatorScapulae2: resting_length=0.1498508 stiffness=10 dissipation=2
      PathPoint P1: thorax (-0.03789 0.10127 0.02215)
      PathPoint P2: scapula (-0.06924 0.00225 -0.10055)
      PathWrap: wrap_object=Thorax method=hybrid
    PathSpring Coracobrachialis1: resting_length=0.1104911 stiffness=10 dissipation=2
      PathPoint P1: thorax (0.00135 -0.01426 0.13126)
      PathPoint P2: humerus (-0.00152 -0.10972 -0.00825)
    PathSpring Coracobrachialis2: resting_length=0.1228629 stiffness=10 dissipation=2
      PathPoint P1: thorax (0.00169 -0.01595 0.12828)
      PathPoint P2: humerus (-0.00231 -0.12549 -0.00933)
    PathSpring Coracobrachialis3: resting_length=0.1149123 stiffness=10 dissipation=2
      PathPoint P1: thorax (0.00205 -0.01478 0.12988)
      PathPoint P2: humerus (-0.00073 -0.1157 -0.00877)
    PathSpring DeltoideusClavicle1: resting_length=0.1699104 stiffness=10 dissipation=2
      PathPoint P1: clavicle (-0.02202 0.0198 0.11357)
      PathPoint P2: clavicle (-0.00968 0.00906 0.16074)
      PathPoint P3: humerus (0.00049 -0.08573 0.01128)
      PathWrap: wrap_object=deltsca method=hybrid
    PathSpring DeltoideusClavicle2: resting_length=0.1716184 stiffness=10 dissipation=2
      PathPoint P1: clavicle (-0.02225 0.01472 0.08649)
      PathPoint P2: clavicle (-0.00138 0.01326 0.11949)
      PathPoint P3: humerus (0.00203 -0.11509 -0.00493)
      PathWrap: wrap_object=deltsca method=hybrid
    PathSpring DeltoideusClavicle3: resting_length=0.1679533 stiffness=10 dissipation=2
      PathPoint P1: clavicle (-0.02503 0.01901 0.09784)
      PathPoint P2: clavicle (-0.00101 0.01258 0.14308)
      PathPoint P3: humerus (0.00128 -0.09191 0.01357)
      PathWrap: wrap_object=deltsca method=hybrid
    PathSpring DeltoideusClavicle4: resting_length=0.1835051 stiffness=10 dissipation=2
      PathPoint P1: clavicle (-0.02948 0.01557 0.08911)
      PathPoint P2: clavicle (3e-5 0.01339 0.13347)
      PathPoint P3: humerus (0.00163 -0.11241 -0.00487)
      PathWrap: wrap_object=deltsca method=hybrid
    PathSpring DeltoideusScapulaPost1: resting_length=0.1953505 stiffness=10 dissipation=2
      PathPoint P1: scapula (-0.07487 -0.01348 -0.06723)
      PathPoint P2: scapula (-0.06737 -0.0204 -0.00113)
      PathPoint P3: humerus (-0.0051 -0.10105 0.01395)
      PathWrap: wrap_object=deltsca method=hybrid
    PathSpring DeltoideusScapulaPost2: resting_length=0.166328 stiffness=10 dissipation=2
      PathPoint P1: scapula (-0.06212 -0.0028 -0.03745)
      PathPoint P2: scapula (-0.05826 -0.01191 0.00964)
      PathPoint P3: humerus (-0.00851 -0.08793 0.01655)
      PathWrap: wrap_object=deltsca method=hybrid
    PathSpring DeltoideusScapulaPost3: resting_length=0.1532799 stiffness=10 dissipation=2
      PathPoint P1: scapula (-0.05092 -0.00071 -0.00963)
      PathPoint P2: scapula (-0.0441 -0.00875 0.02324)
      PathPoint P3: humerus (-0.00824 -0.09055 0.01572)
      PathWrap: wrap_object=deltsca method=hybrid
    PathSpring DeltoideusScapulaLat4: resting_length=0.1264643 stiffness=10 dissipation=2
      PathPoint P1: scapula (-0.03937 0.00232 0.00533)
      PathPoint P2: scapula (-0.03751 -0.00304 0.02146)
      PathPoint P3: humerus (0.00175 -0.07367 0.00863)
      PathWrap: wrap_object=deltsca method=hybrid
    PathSpring DeltoideusScapulaLat5: resting_length=0.1203755 stiffness=10 dissipation=2
      PathPoint P1: scapula (-0.02698 -0.0005 0.01162)
      PathPoint P2: scapula (-0.02047 -0.00291 0.02782)
      PathPoint P3: humerus (0.00226 -0.06815 0.00777)
      PathWrap: wrap_object=deltsca method=hybrid
    PathSpring DeltoideusScapulaLat6: resting_length=0.1533905 stiffness=10 dissipation=2
      PathPoint P1: scapula (-0.01799 -0.00032 0.01083)
      PathPoint P2: scapula (-0.00691 -0.00498 0.02771)
      PathPoint P3: humerus (0.00073 -0.09906 0.00973)
      PathWrap: wrap_object=deltsca method=hybrid
    PathSpring DeltoideusScapulaLat7: resting_length=0.160403 stiffness=10 dissipation=2
      PathPoint P1: scapula (-0.03558 -0.00355 0.01321)
      PathPoint P2: scapula (-0.03017 -0.00481 0.02789)
      PathPoint P3: humerus (0.00022 -0.1132 0.00561)
      PathWrap: wrap_object=deltsca method=hybrid
    PathSpring DeltoideusScapulaLat8: resting_length=0.1503944 stiffness=10 dissipation=2
      PathPoint P1: scapula (-0.02372 0.00052 0.01216)
      PathPoint P2: scapula (-0.01397 -0.00296 0.02803)
      PathPoint P3: humerus (0.00278 -0.09715 0.00909)
      PathWrap: wrap_object=deltsca method=hybrid
    PathSpring DeltoideusScapulaLat9: resting_length=0.1591257 stiffness=10 dissipation=2
      PathPoint P1: scapula (-0.00696 0.00099 0.00922)
      PathPoint P2: scapula (0.00606 -0.0078 0.0255)
      PathPoint P3: humerus (0.00235 -0.10592 0.00526)
      PathWrap: wrap_object=deltsca method=hybrid
    PathSpring DeltoideusScapulaLat10: resting_length=0.1554157 stiffness=10 dissipation=2
      PathPoint P1: scapula (-0.01535 -0.00196 0.01028)
      PathPoint P2: scapula (-0.00019 -0.00781 0.02775)
      PathPoint P3: humerus (0.00181 -0.09982 0.00857)
      PathWrap: wrap_object=deltsca method=hybrid
    PathSpring DeltoideusScapulaLat11: resting_length=0.1384823 stiffness=10 dissipation=2
      PathPoint P1: scapula (-0.00058 -0.00314 0.00288)
      PathPoint P2: scapula (0.01023 -0.00828 0.02174)
      PathPoint P3: humerus (-0.0007 -0.08619 0.01082)
      PathWrap: wrap_object=deltsca method=hybrid
    PathSpring LatissimusDorsi1: resting_length=0.3343799 stiffness=10 dissipation=2
      PathPoint P1: thorax (-0.10088 -0.11663 0.00171)
      PathPoint P2: thorax (-0.1155 -0.11639 0.0288)
      MovingPathPoint P3: thorax socket_x_coordinate=/jointset/GlenoHumeral/shoulder_elv
          socket_y_coordinate=/jointset/GlenoHumeral/shoulder_elv
          socket_z_coordinate=/jointset/GlenoHumeral/shoulder_elv
        x_location: SimmSpline: x=(0 3.14159) y=(-0.122564 -0.123775)
        y_location: SimmSpline: x=(0 3.14159) y=(-0.098615 -0.106769)
        z_location: SimmSpline: x=(0 3.14159) y=(0.101016 0.114972)
      MovingPathPoint P4: thorax socket_x_coordinate=/jointset/GlenoHumeral/shoulder_elv
          socket_y_coordinate=/jointset/GlenoHumeral/shoulder_elv
          socket_z_coordinate=/jointset/GlenoHumeral/shoulder_elv
        x_location: SimmSpline: x=(0 3.14159) y=(-0.09279 -0.094357)
        y_location: SimmSpline: x=(0 3.14159) y=(-0.08329 -0.084707)
        z_location: SimmSpline: x=(0 3.14159) y=(0.13581 0.144557)
      PathPoint P5: humerus (0.00588 -0.01904 -0.00345)
      PathWrap: wrap_object=Thorax method=hybrid
      PathWrap pathwrap_0: wrap_object=LatDorsi method=hybrid
    PathSpring LatissimusDorsi2: resting_length=0.3577598 stiffness=10 dissipation=2
      PathPoint P1: thorax (-0.09748 -0.17378 0.002)
      PathPoint P2: thorax (-0.11452 -0.1695 0.02646)
      MovingPathPoint P3: thorax socket_x_coordinate=/jointset/GlenoHumeral/shoulder_elv
          socket_y_coordinate=/jointset/GlenoHumeral/shoulder_elv
          socket_z_coordinate=/jointset/GlenoHumeral/shoulder_elv
        x_location: SimmSpline: x=(0 3.14159) y=(-0.111911 -0.113834)
        y_location: SimmSpline: x=(0 3.14159) y=(-0.128632 -0.133045)
        z_location: SimmSpline: x=(0 3.14159) y=(0.107923 0.120324)
      MovingPathPoint P4: thorax socket_x_coordinate=/jointset/GlenoHumeral/shoulder_elv
          socket_y_coordinate=/jointset/GlenoHumeral/shoulder_elv
          socket_z_coordinate=/jointset/GlenoHumeral/shoulder_elv
        x_location: SimmSpline: x=(0 3.14159) y=(-0.081771 -0.083338)
        y_location: SimmSpline: x=(0 3.14159) y=(-0.097592 -0.099009)
        z_location: SimmSpline: x=(0 3.14159) y=(0.137583 0.14633)
      PathPoint P5: humerus (0.00589 -0.03245 0.00126)
      PathWrap: wrap_object=Thorax method=hybrid
      PathWrap pathwrap_0: wrap_object=LatDorsi method=hybrid
    PathSpring LatissimusDorsi3: resting_length=0.3760709 stiffness=10 dissipation=2
      PathPoint P1: thorax (-0.09082 -0.21745 -0.00156)
      PathPoint P2: thorax (-0.10768 -0.20544 0.02623)
      MovingPathPoint P3: thorax socket_x_coordinate=/jointset/GlenoHumeral/shoulder_elv
          socket_y_coordinate=/jointset/GlenoHumeral/shoulder_elv
          socket_z_coordinate=/jointset/GlenoHumeral/shoulder_elv
        x_location: SimmSpline: x=(0 3.14159) y=(-0.103889 -0.101761)
        y_location: SimmSpline: x=(0 3.14159) y=(-0.147585 -0.149604)
        z_location: SimmSpline: x=(0 3.14159) y=(0.113647 0.122566)
      MovingPathPoint P4: thorax socket_x_coordinate=/jointset/GlenoHumeral/shoulder_elv
          socket_y_coordinate=/jointset/GlenoHumeral/shoulder_elv
          socket_z_coordinate=/jointset/GlenoHumeral/shoulder_elv
        x_location: SimmSpline: x=(0 3.14159) y=(-0.076222 -0.077789)
        y_location: SimmSpline: x=(0 3.14159) y=(-0.110351 -0.111768)
        z_location: SimmSpline: x=(0 3.14159) y=(0.140024 0.148771)
      PathPoint P5: humerus (0.00578 -0.06289 -0.0027)
      PathWrap: wrap_object=Thorax method=hybrid
      PathWrap pathwrap_0: wrap_object=LatDorsi method=hybrid
    PathSpring LatissimusDorsi4: resting_length=0.3888051 stiffness=10 dissipation=2
      PathPoint P1: thorax (-0.08351 -0.26501 0.00565)
      PathPoint P2: thorax (-0.09691 -0.24109 0.03477)
      MovingPathPoint P3: thorax socket_x_coordinate=/jointset/GlenoHumeral/shoulder_elv
          socket_y_coordinate=/jointset/GlenoHumeral/shoulder_elv
          socket_z_coordinate=/jointset/GlenoHumeral/shoulder_elv
        x_location: SimmSpline: x=(0 3.14159) y=(-0.09465 -0.092521)
        y_location: SimmSpline: x=(0 3.14159) y=(-0.167707 -0.169726)
        z_location: SimmSpline: x=(0 3.14159) y=(0.114954 0.123872)
      PathPoint P4: humerus (0.00558 -0.04072 0.00094)
      PathWrap: wrap_object=Thorax method=hybrid
      PathWrap pathwrap_0: wrap_object=LatDorsi method=hybrid
    PathSpring LatissimusDorsi5: resting_length=0.3388922 stiffness=10 dissipation=2
      PathPoint P1: thorax (-0.06895 -0.26228 0.0645)
      PathPoint P2: thorax (-0.06991 -0.18575 0.12416)
      MovingPathPoint P3: thorax socket_x_coordinate=/jointset/GlenoHumeral/shoulder_elv
          socket_y_coordinate=/jointset/GlenoHumeral/shoulder_elv
          socket_z_coordinate=/jointset/GlenoHumeral/shoulder_elv
        x_location: SimmSpline: x=(0 3.14159) y=(-0.054744 -0.057081)
        y_location: SimmSpline: x=(0 3.14159) y=(-0.131504 -0.131718)
        z_location: SimmSpline: x=(0 3.14159) y=(0.143668 0.152667)
      PathPoint P4: humerus (0.00563 -0.05063 0.0003)
      PathWrap: wrap_object=Thorax method=hybrid
      PathWrap pathwrap_0: wrap_object=LatDorsi method=hybrid
    PathSpring LatissimusDorsi6: resting_length=0.3049742 stiffness=10 dissipation=2
      PathPoint P1: thorax (-0.06274 -0.25482 0.09061)
      PathPoint P2: thorax (-0.05149 -0.1926 0.12955)
      MovingPathPoint P3: thorax socket_x_coordinate=/jointset/GlenoHumeral/shoulder_elv
          socket_y_coordinate=/jointset/GlenoHumeral/shoulder_elv
          socket_z_coordinate=/jointset/GlenoHumeral/shoulder_elv
        x_location: SimmSpline: x=(0 3.14159) y=(-0.041258 -0.032577)
        y_location: SimmSpline: x=(0 3.14159) y=(-0.146638 -0.139479)
        z_location: SimmSpline: x=(0 3.14159) y=(0.146215 0.149666)
      PathPoint P4: humerus (0.00422 -0.05793 -0.00018)
      PathWrap: wrap_object=Thorax method=hybrid
      PathWrap pathwrap_0: wrap_object=LatDorsi method=hybrid
    PathSpring PectoralisMajorClavicle1: resting_length=0.1338239 stiffness=10 dissipation=2
      PathPoint P1: scapula (0.0189 -0.0236 -0.09975)
      PathPoint P2: humerus (0.01256 -0.06708 -0.0008)
      PathWrap: wrap_object=Thorax method=hybrid
      PathWrap pathwrap_0: wrap_object=PectMajor method=hybrid
    PathSpring PectoralisMajorClavicle2: resting_length=0.1201564 stiffness=10 dissipation=2
      PathPoint P1: scapula (0.01574 -0.01797 -0.08313)
      PathPoint P2: humerus (0.01061 -0.06093 -0.00103)
      PathWrap: wrap_object=Thorax method=hybrid
      PathWrap pathwrap_0: wrap_object=PectMajor method=hybrid
    PathSpring PectoralisMajorThorax1: resting_length=0.1343919 stiffness=10 dissipation=2
      PathPoint P1: thorax (0.06568 -0.13732 0.04256)
      PathPoint P2: humerus (0.01313 -0.09788 -0.00412)
      PathWrap: wrap_object=Thorax method=hybrid
      PathWrap pathwrap_0: wrap_object=PectMajor method=hybrid
    PathSpring PectoralisMajorThorax2: resting_length=0.1406633 stiffness=10 dissipation=2
      PathPoint P1: thorax (0.05321 -0.11566 0.02474)
      PathPoint P2: humerus (0.01272 -0.09089 -0.00349)
      PathWrap: wrap_object=Thorax method=hybrid
      PathWrap pathwrap_0: wrap_object=PectMajor method=hybrid
    PathSpring PectoralisMajorThorax3: resting_length=0.1386924 stiffness=10 dissipation=2
      PathPoint P1: thorax (0.0459 -0.08506 0.01491)
      PathPoint P2: humerus (0.01207 -0.0844 -0.00323)
      PathWrap: wrap_object=Thorax method=hybrid
      PathWrap pathwrap_0: wrap_object=PectMajor method=hybrid
    PathSpring PectoralisMajorThorax4: resting_length=0.1413114 stiffness=10 dissipation=2
      PathPoint P1: thorax (0.03558 -0.05843 0.00842)
      PathPoint P2: humerus (0.01249 -0.07701 -0.00233)
      PathWrap: wrap_object=Thorax method=hybrid
      PathWrap pathwrap_0: wrap_object=PectMajor method=hybrid
    PathSpring PectoralisMajorThorax5: resting_length=0.1399158 stiffness=10 dissipation=2
      PathPoint P1: thorax (0.01954 -0.03223 0.01381)
      PathPoint P2: humerus (0.0129 -0.07182 -0.00162)
      PathWrap: wrap_object=Thorax method=hybrid
      PathWrap pathwrap_0: wrap_object=PectMajor method=hybrid
    PathSpring PectoralisMajorThorax6: resting_length=0.1381005 stiffness=10 dissipation=2
      PathPoint P1: thorax (0.01013 -0.01675 0.02155)
      PathPoint P2: humerus (0.01142 -0.06556 -6e-5)
      PathWrap: wrap_object=Thorax method=hybrid
      PathWrap pathwrap_0: wrap_object=PectMajor method=hybrid
    PathSpring TeresMajor1: resting_length=0.1349909 stiffness=10 dissipation=2
      PathPoint P1: scapula (-0.10441 -0.11741 -0.07212)
      PathPoint P2: humerus (0.00432 -0.06724 -0.0017)
      PathWrap: wrap_object=hhead method=hybrid
      PathWrap pathwrap_0: wrap_object=Thorax method=hybrid
      PathWrap pathwrap_1: wrap_object=Tmajscapula method=hybrid
      PathWrap pathwrap_2: wrap_object=TeresMajor method=hybrid
    PathSpring TeresMajor2: resting_length=0.1384397 stiffness=10 dissipation=2
      PathPoint P1: scapula (-0.10546 -0.12339 -0.07706)
      PathPoint P2: humerus (0.00275 -0.07709 -0.00266)
      PathWrap: wrap_object=hhead method=hybrid
      PathWrap pathwrap_0: wrap_object=Thorax method=hybrid
      PathWrap pathwrap_1: wrap_object=Tmajscapula method=hybrid
      PathWrap pathwrap_2: wrap_object=TeresMajor method=hybrid
    PathSpring TeresMajor3: resting_length=0.1453829 stiffness=10 dissipation=2
      PathPoint P1: scapula (-0.10525 -0.12194 -0.08253)
      PathPoint P2: humerus (0.00536 -0.07141 -0.00244)
      PathWrap: wrap_object=hhead method=hybrid
      PathWrap pathwrap_0: wrap_object=Thorax method=hybrid
      PathWrap pathwrap_1: wrap_object=Tmajscapula method=hybrid
      PathWrap pathwrap_2: wrap_object=TeresMajor method=hybrid
    PathSpring TeresMajor4: resting_length=0.1315454 stiffness=10 dissipation=2
      PathPoint P1: scapula (-0.10457 -0.11033 -0.06661)
      PathPoint P2: humerus (0.00453 -0.05467 -0.00174)
      PathWrap: wrap_object=hhead method=hybrid
      PathWrap pathwrap_0: wrap_object=Thorax method=hybrid
      PathWrap pathwrap_1: wrap_object=Tmajscapula method=hybrid
      PathWrap pathwrap_2: wrap_object=TeresMajor method=hybrid
    PathSpring Infraspinatus1: resting_length=0.1168975 stiffness=10 dissipation=2
      PathPoint P1: scapula (-0.086 -0.05465 -0.06851)
      PathPoint P2: humerus (-0.01473 -0.00343 0.02003)
      PathWrap: wrap_object=Infra method=hybrid
      PathWrap pathwrap_0: wrap_object=hheadInfra method=hybrid
    PathSpring Infraspinatus2: resting_length=0.1558237 stiffness=10 dissipation=2
      PathPoint P1: scapula (-0.10796 -0.09662 -0.0924)
      PathPoint P2: humerus (-0.01543 -0.01018 0.01709)
      PathWrap: wrap_object=Infra method=hybrid
      PathWrap pathwrap_0: wrap_object=hheadInfra method=hybrid
    PathSpring Infraspinatus3: resting_length=0.1407323 stiffness=10 dissipation=2
      PathPoint P1: scapula (-0.09907 -0.08085 -0.08129)
      PathPoint P2: humerus (-0.01526 0.00044 0.01922)
      PathWrap: wrap_object=Infra method=hybrid
      PathWrap pathwrap_0: wrap_object=hheadInfra method=hybrid
    PathSpring Infraspinatus4: resting_length=0.1515448 stiffness=10 dissipation=2
      PathPoint P1: scapula (-0.09237 -0.05118 -0.08662)
      PathPoint P2: humerus (-0.01444 0.0033 0.02009)
      PathWrap: wrap_object=Infra method=hybrid
      PathWrap pathwrap_0: wrap_object=hheadInfra method=hybrid
    PathSpring Infraspinatus5: resting_length=0.1450425 stiffness=10 dissipation=2
      PathPoint P1: scapula (-0.08343 -0.03227 -0.08691)
      PathPoint P2: humerus (-0.01543 0.00228 0.01963)
      PathWrap: wrap_object=Infra method=hybrid
      PathWrap pathwrap_0: wrap_object=hheadInfra method=hybrid
    PathSpring Infraspinatus6: resting_length=0.127507 stiffness=10 dissipation=2
      PathPoint P1: scapula (-0.0747 -0.01255 -0.06496)
      PathPoint P2: humerus (-0.01472 0.00098 0.01943)
      PathWrap: wrap_object=Infra method=hybrid
      PathWrap pathwrap_0: wrap_object=hheadInfra method=hybrid
    PathSpring PectoralisMinor1: resting_length=0.08964105 stiffness=10 dissipation=2
      PathPoint P1: thorax (0.02975 -0.05908 0.0623)
      PathPoint P2: scapula (0.0094 -0.03564 -0.03268)
      PathWrap: wrap_object=Thorax method=hybrid
    PathSpring PectoralisMinor2: resting_length=0.08533432 stiffness=10 dissipation=2
      PathPoint P1: thorax (0.02782 -0.05796 0.07101)
      PathPoint P2: scapula (0.0103 -0.03659 -0.03122)
      PathWrap: wrap_object=Thorax method=hybrid
    PathSpring PectoralisMinor3: resting_length=0.1295861 stiffness=10 dissipation=2
      PathPoint P1: thorax (0.04417 -0.10719 0.08664)
      PathPoint P2: scapula (0.01133 -0.03692 -0.03161)
      PathWrap: wrap_object=Thorax method=hybrid
    PathSpring PectoralisMinor4: resting_length=0.1101753 stiffness=10 dissipation=2
      PathPoint P1: thorax (0.03978 -0.08651 0.07516)
      PathPoint P2: scapula (0.01115 -0.03957 -0.02909)
      PathWrap: wrap_object=Thorax method=hybrid
    PathSpring TeresMinor1: resting_length=0.08059089 stiffness=10 dissipation=2
      PathPoint P1: scapula (-0.07595 -0.06415 -0.03584)
      PathPoint P2: humerus (-0.01517 -0.00849 0.01348)
      PathWrap: wrap_object=hheadsupraTminor method=hybrid
    PathSpring TeresMinor2: resting_length=0.08861468 stiffness=10 dissipation=2
      PathPoint P1: scapula (-0.08437 -0.06605 -0.0423)
      PathPoint P2: humerus (-0.01587 -0.00936 0.01085)
      PathWrap: wrap_object=hheadsupraTminor method=hybrid
    PathSpring TeresMinor3: resting_length=0.06133761 stiffness=10 dissipation=2
      PathPoint P1: scapula (-0.05734 -0.04889 -0.02702)
      PathPoint P2: humerus (-0.01981 0.00158 0.01602)
      PathWrap: wrap_object=hheadsupraTminor method=hybrid
    PathSpring Subscapularis1: resting_length=0.1077953 stiffness=10 dissipation=2
      PathPoint P1: scapula (-0.05949 -0.02889 -0.06461)
      PathPoint P2: humerus (0.02106 0.00182 0.00212)
      PathWrap: wrap_object=Subscapuralis method=hybrid
      PathWrap pathwrap_0: wrap_object=hhead method=hybrid
    PathSpring Subscapularis2: resting_length=0.1204345 stiffness=10 dissipation=2
      PathPoint P1: scapula (-0.05863 -0.01006 -0.07953)
      PathPoint P2: humerus (0.02082 0.00087 0.00303)
      PathWrap: wrap_object=Subscapuralis method=hybrid
      PathWrap pathwrap_0: wrap_object=hhead method=hybrid
    PathSpring Subscapularis3: resting_length=0.1372619 stiffness=10 dissipation=2
      PathPoint P1: scapula (-0.07879 -0.03127 -0.0903)
      PathPoint P2: humerus (0.02065 -0.00023 0.00111)
      PathWrap: wrap_object=Subscapuralis method=hybrid
      PathWrap pathwrap_0: wrap_object=hhead method=hybrid
    PathSpring Subscapularis4: resting_length=0.1343207 stiffness=10 dissipation=2
      PathPoint P1: scapula (-0.08357 -0.05491 -0.07477)
      PathPoint P2: humerus (0.02069 0.0003 0.00206)
      PathWrap: wrap_object=Subscapuralis method=hybrid
      PathWrap pathwrap_0: wrap_object=hhead method=hybrid
    PathSpring Subscapularis5: resting_length=0.1335055 stiffness=10 dissipation=2
      PathPoint P1: scapula (-0.08149 -0.06719 -0.06879)
      PathPoint P2: humerus (0.02112 -0.00092 0.00348)
      PathWrap: wrap_object=Subscapuralis method=hybrid
      PathWrap pathwrap_0: wrap_object=hhead method=hybrid
    PathSpring Subscapularis6: resting_length=0.1580284 stiffness=10 dissipation=2
      PathPoint P1: scapula (-0.09739 -0.08738 -0.0802)
      PathPoint P2: humerus (0.02079 -0.00255 0.00365)
      PathWrap: wrap_object=Subscapuralis method=hybrid
      PathWrap pathwrap_0: wrap_object=hhead method=hybrid
    PathSpring Subscapularis7: resting_length=0.1565116 stiffness=10 dissipation=2
      PathPoint P1: scapula (-0.09469 -0.10212 -0.07511)
      PathPoint P2: humerus (0.01636 -0.00657 0.00235)
      PathWrap: wrap_object=Subscapuralis method=hybrid
      PathWrap pathwrap_0: wrap_object=hhead method=hybrid
    PathSpring Subscapularis8: resting_length=0.1190181 stiffness=10 dissipation=2
      PathPoint P1: scapula (-0.07182 -0.07419 -0.05305)
      PathPoint P2: humerus (0.01914 -0.00046 0.00088)
      PathWrap: wrap_object=Subscapuralis method=hybrid
      PathWrap pathwrap_0: wrap_object=hhead method=hybrid
    PathSpring Subscapularis9: resting_length=0.1628181 stiffness=10 dissipation=2
      PathPoint P1: scapula (-0.09507 -0.09765 -0.0854)
      PathPoint P2: humerus (0.0202 -0.00313 0.00416)
      PathWrap: wrap_object=Subscapuralis method=hybrid
      PathWrap pathwrap_0: wrap_object=hhead method=hybrid
    PathSpring Subscapularis10: resting_length=0.1333741 stiffness=10 dissipation=2
      PathPoint P1: scapula (-0.07126 -0.04969 -0.08974)
      PathPoint P2: humerus (0.02062 0.0001 0.00258)
      PathWrap: wrap_object=Subscapuralis method=hybrid
      PathWrap pathwrap_0: wrap_object=hhead method=hybrid
    PathSpring Subscapularis11: resting_length=0.0936536 stiffness=10 dissipation=2
      PathPoint P1: scapula (-0.05093 -0.05443 -0.02873)
      PathPoint P2: humerus (0.02093 -0.00034 0.00322)
      PathWrap: wrap_object=Subscapuralis method=hybrid
      PathWrap pathwrap_0: wrap_object=hhead method=hybrid
    PathSpring Supraspinatus1: resting_length=0.09978672 stiffness=10 dissipation=2
      PathPoint P1: scapula (-0.05606 -0.01096 -0.05304)
      PathPoint P2: humerus (0.00373 0.01684 0.0213)
      PathWrap: wrap_object=hheadsupraTminor method=hybrid
    PathSpring Supraspinatus2: resting_length=0.09914774 stiffness=10 dissipation=2
      PathPoint P1: scapula (-0.06053 -0.00138 -0.04947)
      PathPoint P2: humerus (-0.00032 0.01714 0.02495)
      PathWrap: wrap_object=hheadsupraTminor method=hybrid
    PathSpring Supraspinatus3: resting_length=0.1333089 stiffness=10 dissipation=2
      PathPoint P1: scapula (-0.06207 -0.00027 -0.0883)
      PathPoint P2: humerus (0.01223 0.01716 0.01585)
      PathWrap: wrap_object=hheadsupraTminor method=hybrid
    PathSpring Supraspinatus4: resting_length=0.1093215 stiffness=10 dissipation=2
      PathPoint P1: scapula (-0.04605 -0.00098 -0.07462)
      PathPoint P2: humerus (0.01778 0.01764 0.00965)
      PathWrap: wrap_object=Thorax method=hybrid
      PathWrap pathwrap_0: wrap_object=hheadsupraTminor method=hybrid
    PathSpring TRIlong1: resting_length=0.2938449 stiffness=10 dissipation=2
      PathPoint P1: ulna (-0.0241845 -0.0232003 -0.00238228)
      PathPoint P2: scapula (-0.04831 -0.0547633 -0.0184833)
    PathSpring TRIlong2: resting_length=0.3027686 stiffness=10 dissipation=2
      PathPoint P1: ulna (-0.019462 -0.0291087 0.00865977)
      PathPoint P2: scapula (-0.0421 -0.0519025 -0.0129254)
    PathSpring TRIlong3: resting_length=0.3138555 stiffness=10 dissipation=2
      PathPoint P1: ulna (-0.0188466 -0.0399547 0.00340208)
      PathPoint P2: scapula (-0.0383852 -0.0512347 -0.0141204)
    PathSpring TRIlong4: resting_length=0.3096293 stiffness=10 dissipation=2
      PathPoint P1: ulna (-0.0223253 -0.0350177 0.010842)
      PathPoint P2: scapula (-0.0478927 -0.0520923 -0.02299)
    PathSpring BIC_long: resting_length=0.4200027 stiffness=10 dissipation=2
      PathPoint P1: scapula (-0.021377 -0.0229416 -0.0156254)
      PathPoint P2: humerus (0.0136607 0.0218408 0.0152931)
      PathPoint P3: radius (-0.00088465 -0.0439944 -0.00945516)
      PathWrap: wrap_object=hhead method=hybrid
    PathSpring BIC_brevis1: resting_length=0.3429765 stiffness=10 dissipation=2
      PathPoint P1: scapula (0.00954748 -0.0382221 -0.0242473)
      PathPoint P2: radius (0.00020307 -0.0442563 -0.00985953)
    PathSpring BIC_brevis2: resting_length=0.3429765 stiffness=10 dissipation=2
      PathPoint P1: scapula (0.00954748 -0.0382221 -0.0242473)
      PathPoint P2: radius (0.00020307 -0.0442563 -0.00985953)
    ObjectGroup Scapulothoracic: members=(LevatorScapulae1 LevatorScapulae2 PectoralisMinor1 PectoralisMinor2 PectoralisMinor3 PectoralisMinor4 Rhomboideus1 Rhomboideus2 Rhomboideus3 Rhomboideus4 Rhomboideus5 SerratusAnterior1 SerratusAnterior10 SerratusAnterior11 SerratusAnterior12 SerratusAnterior2 SerratusAnterior3 SerratusAnterior4 SerratusAnterior5 SerratusAnterior6 SerratusAnterior7 SerratusAnterior8 SerratusAnterior9 TrapeziusScapula1 TrapeziusScapula10 TrapeziusScapula11 TrapeziusScapula2 TrapeziusScapula3 TrapeziusScapula4 TrapeziusScapula5 TrapeziusScapula6 TrapeziusScapula7 TrapeziusScapula8 TrapeziusScapula9)
    ObjectGroup ScapuloHumeral: members=(Coracobrachialis1 Coracobrachialis2 Coracobrachialis3 DeltoideusClavicle1 DeltoideusClavicle2 DeltoideusClavicle3 DeltoideusClavicle4 Infraspinatus1 Infraspinatus2 Infraspinatus3 Infraspinatus4 Infraspinatus5 Infraspinatus6 Subscapularis1 Subscapularis10 Subscapularis11 Subscapularis2 Subscapularis3 Subscapularis4 Subscapularis5 Subscapularis6 Subscapularis7 Subscapularis8 Subscapularis9 Supraspinatus1 Supraspinatus2 Supraspinatus3 Supraspinatus4 TeresMajor1 TeresMajor2 TeresMajor3 TeresMajor4 TeresMinor1 TeresMinor2 TeresMinor3)
    ObjectGroup PLOT: members=(DeltoideusClavicle1 DeltoideusClavicle2 DeltoideusClavicle3 DeltoideusClavicle4 DeltoideusScapulaLat10 DeltoideusScapulaLat11 DeltoideusScapulaLat4 DeltoideusScapulaLat5 DeltoideusScapulaLat6 DeltoideusScapulaLat7 DeltoideusScapulaLat8 DeltoideusScapulaLat9 DeltoideusScapulaPost1 DeltoideusScapulaPost2 DeltoideusScapulaPost3 Infraspinatus1 Infraspinatus2 Infraspinatus3 Infraspinatus4 Infraspinatus5 Infraspinatus6 LatissimusDorsi1 LatissimusDorsi2 LatissimusDorsi3 LatissimusDorsi4 LatissimusDorsi5 LatissimusDorsi6 PectoralisMajorClavicle1 PectoralisMajorClavicle2 PectoralisMajorThorax1 PectoralisMajorThorax2 PectoralisMajorThorax3 PectoralisMajorThorax4 PectoralisMajorThorax5 PectoralisMajorThorax6 Subscapularis1 Subscapularis10 Subscapularis11 Subscapularis2 Subscapularis3 Subscapularis4 Subscapularis5 Subscapularis6 Subscapularis7 Subscapularis8 Subscapularis9 Supraspinatus1 Supraspinatus2 Supraspinatus3 Supraspinatus4 TeresMajor1 TeresMajor2 TeresMajor3 TeresMajor4 TeresMinor1 TeresMinor2 TeresMinor3)
    ObjectGroup Scaption0: members=(Infraspinatus1 Infraspinatus2 Infraspinatus3 Infraspinatus4 Infraspinatus5 Infraspinatus6 Subscapularis1 Subscapularis10 Subscapularis11 Subscapularis2 Subscapularis3 Subscapularis4 Subscapularis5 Subscapularis6 Subscapularis7 Subscapularis8 Subscapularis9 Supraspinatus1 Supraspinatus2 Supraspinatus3 Supraspinatus4 TeresMinor1 TeresMinor2 TeresMinor3)
    ObjectGroup Scaption45: members=(DeltoideusClavicle1 DeltoideusClavicle2 DeltoideusClavicle3 DeltoideusClavicle4 DeltoideusScapulaLat10 DeltoideusScapulaLat11 DeltoideusScapulaLat4 DeltoideusScapulaLat5 DeltoideusScapulaLat6 DeltoideusScapulaLat7 DeltoideusScapulaLat8 DeltoideusScapulaLat9 DeltoideusScapulaPost1 DeltoideusScapulaPost2 DeltoideusScapulaPost3 LatissimusDorsi1 LatissimusDorsi2 LatissimusDorsi3 LatissimusDorsi4 LatissimusDorsi5 LatissimusDorsi6 PectoralisMajorClavicle1 PectoralisMajorClavicle2 PectoralisMajorThorax1 PectoralisMajorThorax2 PectoralisMajorThorax3 PectoralisMajorThorax4 PectoralisMajorThorax5 PectoralisMajorThorax6)
    ObjectGroup ThoracoHumeral: members=(LatissimusDorsi1 LatissimusDorsi2 LatissimusDorsi3 LatissimusDorsi4 LatissimusDorsi5 LatissimusDorsi6 PectoralisMajorClavicle1 PectoralisMajorClavicle2 PectoralisMajorThorax1 PectoralisMajorThorax2 PectoralisMajorThorax3 PectoralisMajorThorax4 PectoralisMajorThorax5 PectoralisMajorThorax6)
    ObjectGroup Rotator: members=(Infraspinatus1 Infraspinatus2 Infraspinatus3 Infraspinatus4 Infraspinatus5 Infraspinatus6 Subscapularis1 Subscapularis10 Subscapularis11 Subscapularis2 Subscapularis3 Subscapularis4 Subscapularis5 Subscapularis6 Subscapularis7 Subscapularis8 Subscapularis9 Supraspinatus1 Supraspinatus2 Supraspinatus3 Supraspinatus4 TeresMajor1 TeresMajor2 TeresMajor3 TeresMajor4 TeresMinor1 TeresMinor2 TeresMinor3)
    ObjectGroup Cuff: members=(Infraspinatus1 Infraspinatus2 Infraspinatus3 Infraspinatus4 Infraspinatus5 Infraspinatus6 Subscapularis1 Subscapularis10 Subscapularis11 Subscapularis2 Subscapularis3 Subscapularis4 Subscapularis5 Subscapularis6 Subscapularis7 Subscapularis8 Subscapularis9 Supraspinatus1 Supraspinatus2 Supraspinatus3 Supraspinatus4 TeresMajor1 TeresMajor2 TeresMajor3 TeresMajor4 TeresMinor1 TeresMinor2 TeresMinor3)
  MarkerSet:
    Marker ij: thorax (0 0 0)
    Marker c7: thorax (-0.0831 0.03263 3e-5)
    Marker t8: thorax (-0.102736 -0.153921 -0.000286)
    Marker px: thorax (0.061392 -0.166225 0.00101)
    Marker ClavicleMassCenter: clavicle (-0.02172 0.01007 0.06704)
    Marker acc: clavicle (-0.0339477 0.0211083 0.116684)
    Marker sc: clavicle (0 0 0)
    Marker ScapulaMassCenter: scapula (-0.04612 -0.0319 -0.04565)
    Marker ScapulaThoracicContactPt: scapula (-0.05982 -0.03904 -0.056)
    Marker ac: scapula (-0.00556 -0.00245 -0.01732)
    Marker ai: scapula (-0.104739 -0.119581 -0.08348)
    Marker ts: scapula (-0.08112 -0.010836 -0.097986)
    Marker aa: scapula (-0.038889 -0.001993 0.00172)
    Marker HumerusMassCenter: humerus (0.00537 -0.11493 -0.00261)
    Marker gu: humerus (0 0 0)
    Marker EpL: humerus (0.0028 -0.285686 0.016211)
    Marker EpM: humerus (-0.00092 -0.282757 -0.035518)
    Marker centelbow: humerus (0.0009 -0.2842 -0.0097)
    Marker centijc7: thorax (-0.0415 0.0163 0)
    Marker centpxt8: thorax (-0.0207 -0.1601 0.0004)
    Marker ijc: clavicle (-0.00489311 -0.0162505 -0.0268143)
